// SBML level 2 version 4
// dcterms:bibliographicCitation: urn:miriam:pubmed:30990958

function Constant_flux__irreversible(v)
  v;
end
Constant_flux__irreversible is "Constant flux (irreversible)";

function duel_induction(const, ind1, ind2)
  const*ind1*ind2;
end

function IL10_inhibiting_IFNg(const, mod1, mod2, f_inh)
  const*mod1*mod2*f_inh;
end

function Self_synthesis(const, Product)
  const*Product;
end

function Induced_first_order(cons, Inducer, Substrate)
  cons*Inducer*Substrate;
end

function CARTE_m_func(const, subs, function)
  const*subs*function;
end
CARTE_m_func is "CARTE-m func";

function CARTE_m_func1(const, subs, func)
  const*subs*(1 - func);
end
CARTE_m_func1 is "CARTE-m func1";

model Hardiansyah2019_QSP_model_of_chineric_cntigen_receptor_T_Cell_therapy()
  // Hardiansyah2019 - QSP model of chimeric antigen receptor T-Cell therapy
  // This QSP model explains how the mechanism of action connects to the clinical outcomes and, therefore, may serve as an important model-based platform to guide the development and personalized dosing of the CART therapy.
  // isDescribedBy pubmed:30990958
  // hasTaxon taxonomy:9606
  // hasProperty ncit:C15262 ncit:C16974 mamo:MAMO_0000046
  // biomodels.db:MODEL2009230001

  // Compartments:
  compartment Tumor_Microenvironment = 1;

  // Species:
  // B-Cells of CLL tumor in PB
  species B_pb in Tumor_Microenvironment = 1.1e10;
  species CARTE_pb in Tumor_Microenvironment = 0;
  species IL6 in Tumor_Microenvironment = 0;
  species IL10 in Tumor_Microenvironment = 0;
  species IFNg in Tumor_Microenvironment = 0;
  species CARTE_t in Tumor_Microenvironment = 0;
  species CARTM_pb in Tumor_Microenvironment = 0;
  species CARTM_t in Tumor_Microenvironment = 0;

  // Parameters:
  var Fd_IL10; Fd_IL10 is "Fd(IL10)";
  aG = 0.59 unit_0;
  bG = 650 unit_1;
  var f_B; f_B is "f(B)";
  h = 100000;
  rB = 0.0093 unit_2;
  dB = 0.0076 unit_2;
  Pendo_IL6 = 0.001;
  d_IL6 = 3.96 unit_2;
  Pendo_IL10 = 0.001;
  d_IL10 = 4.68 unit_2;
  Pendo_IFNg = 0.001;
  d_IFNg = 1.51 unit_2;
  kin = 76.78 unit_2;
  kout = 1.84 unit_2;
  aM = 1 unit_2;
  rM = 0.0509 unit_2;
  d_CARTEM = 0.408 unit_2;
  UPN1 = 1;
  quantity_to_number_factor = 6.022141e23;
  Initial_for_UPN1 = UPN1;

  // Assignment rules:
  Fd_IL10 := aG + (1 - aG)*(bG/(IL10*quantity_to_number_factor*Tumor_Microenvironment + bG));
  f_B := B_pb/(B_pb + h);
  Kbc := piecewise(0.19, Initial_for_UPN1 == 1, 2.21);
  P_IL6 := piecewise(0.0018, Initial_for_UPN1 == 1, 0.006);
  P_IL10 := piecewise(0.0007, Initial_for_UPN1 == 1, 0.017);
  P_IFNg := piecewise(0.0003, Initial_for_UPN1 == 1, 0.006);
  D_inj := piecewise(1100000000, Initial_for_UPN1 == 1, 14000000);
  rE := piecewise(16.16, Initial_for_UPN1 == 1, 14.4);
  d_CATRE := piecewise(23.04, Initial_for_UPN1 == 1, 1.44);
  aE := piecewise(0.024, Initial_for_UPN1 == 1, 0.12);

  // Reactions:
  B_pb_exponential_growth_rate: => B_pb; Tumor_Microenvironment*Self_synthesis(rB, B_pb);
  B_pb_decay: B_pb => ; Tumor_Microenvironment*dB*B_pb;
  CARTE_pb_injection: => CARTE_pb; Tumor_Microenvironment*Constant_flux__irreversible(D_inj);
  CARTE_pb_self_growth: => CARTE_pb; Tumor_Microenvironment*duel_induction(rE, B_pb, CARTE_pb);  // modifiers: B_pb
  CARTE_pb_decay: CARTE_pb => ; Tumor_Microenvironment*d_CATRE*CARTE_pb;
  CARTE_pb_conversion_CARTE_t: CARTE_pb -> CARTE_t; Tumor_Microenvironment*(kin*CARTE_pb - kout*CARTE_t);
  CARTE_pb_converion_CARTM_pb: CARTE_pb => CARTM_pb; Tumor_Microenvironment*CARTE_m_func1(aE, CARTE_pb, f_B);
  CARTM_pb_converion_CARTE_pb: CARTM_pb => CARTE_pb; Tumor_Microenvironment*CARTE_m_func(aM, CARTM_pb, f_B);
  B_pb_killing_CARTE: B_pb => ; Tumor_Microenvironment*Induced_first_order(Kbc, CARTE_pb, B_pb);  // modifiers: CARTE_pb
  IL6_const_production: => IL6; Tumor_Microenvironment*Constant_flux__irreversible(Pendo_IL6);
  IL6_induced_production_CARTE_pb: => IL6; Tumor_Microenvironment*duel_induction(P_IL6, CARTE_pb, B_pb);  // modifiers: CARTE_pb, B_pb
  IL6_decay: IL6 => ; Tumor_Microenvironment*d_IL6*IL6;
  IL10_const_production: => IL10; Tumor_Microenvironment*Constant_flux__irreversible(Pendo_IL10);
  IL10_induced_production_CARTE_pb: => IL10; Tumor_Microenvironment*duel_induction(P_IL10, CARTE_pb, B_pb);  // modifiers: CARTE_pb, B_pb
  IL10_decay: IL10 => ; Tumor_Microenvironment*d_IL10*IL10;
  IFNg_const_production: => IFNg; Tumor_Microenvironment*Constant_flux__irreversible(Pendo_IFNg);
  IFNg_induced_production_CARTE_pb: => IFNg; Tumor_Microenvironment*IL10_inhibiting_IFNg(P_IFNg, CARTE_pb, B_pb, Fd_IL10);  // modifiers: CARTE_pb, B_pb
  IFNg_decay: IFNg => ; Tumor_Microenvironment*d_IFNg*IFNg;
  CARTM_pb_self_growth: => CARTM_pb; Tumor_Microenvironment*Self_synthesis(rM, CARTM_pb);
  CARTM_pb_decay: CARTM_pb => ; Tumor_Microenvironment*d_CARTEM*CARTM_pb;
  CARTM_pb_conversion_CARTM_t: CARTM_pb -> CARTM_t; Tumor_Microenvironment*(kin*CARTM_pb - kout*CARTM_t);

  // Unit definitions:
  unit length = metre;
  unit area = metre^2;
  unit volume = 1e-3 litre;
  unit time = 86400 second;
  unit substance = mole;
  unit unit_0 = dimensionless^0; unit_0 is "dimensionless";
  unit unit_1 = 1e-9 gram; unit_1 is "ng";
  unit unit_2 = 1 / (86400 second); unit_2 is "1/d";
end
